OpenVSP model (file version 5), 5 components.
Geometry view with OpenVSP parameter names; values to 6 digits, angles in degrees, lengths in the model's unit.
Overall bounding box: X_Min=-1.90146e-05 X_Len=0.250019 Y_Min=-2.5 Y_Len=5 Z_Min=-0.00502674 Z_Len=0.026901

Wing "WingGeom"
  location (X Y Z) 0 0 0, rotation 0 0 0
  symmetric about XZ
  bounding box size 0.250019 5 0.026901
  totals: TotalSpan=5 TotalProjectedSpan=5 TotalChord=0.25 TotalArea=1.25 TotalAR=20 MAC=0.249983
  root: chord 0.25, twist 0, airfoil file "S7055 (10.5%) Flat-Bottomed"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 BaseThickChord=0.105225 ThickChord=0.105225
  sections:
    n  Span  Root_Chord  Tip_Chord  Area   Sweep  Sweep_Location  Dihedral  Twist  Twist_Location  tip airfoil
    1  2.5   0.25        0.25       0.625  0      0               0         0      0.25            as above

NGonMesh "MeshGeom_NGon"
  location (X Y Z) 0 0 0, rotation 0 0 0
  bounding box size 0.25 2.5 0.0360949

NGonMesh "MeshGeom_NGon"
  location (X Y Z) 0 0 0, rotation 0 0 0
  bounding box size 0.25 2.5 0.0151991

NGonMesh "MeshGeom_NGon"
  location (X Y Z) 0 0 0, rotation 0 0 0
  bounding box size 0.25 2.5 0.0151991

NGonMesh "MeshGeom_NGon"
  location (X Y Z) 0 0 0, rotation 0 0 0
  bounding box size 0.249982 2.5 0.00911987

VSPAERO settings (reference component "WingGeom"): Sref=1.25 bref=5 cref=0.249983 Xcg=0 Ycg=0 Zcg=0 AlphaStart=8.25 AlphaEnd=8.25 AlphaNpts=1 BetaStart=0 BetaEnd=0 BetaNpts=1 MachStart=0.03 MachEnd=0 MachNpts=1 ReCref=1e+07 Vinf=100 Rho=0.002377
